<?xml version="1.0"?>
<!-- $Id$ -->
<!--

  Submarine Scout airship flight model for JSBSim.

    Copyright (C) 2007 - 2008  Anders Gidenstam  (anders(at)gidenstam.org)

    This program is free software; you can redistribute it and/or modify
    it under the terms of the GNU General Public License as published by
    the Free Software Foundation; either version 2 of the License, or
    (at your option) any later version.

    This program is distributed in the hope that it will be useful,
    but WITHOUT ANY WARRANTY; without even the implied warranty of
    MERCHANTABILITY or FITNESS FOR A PARTICULAR PURPOSE.  See the
    GNU General Public License for more details.

    You should have received a copy of the GNU General Public License
    along with this program; if not, write to the Free Software
    Foundation, Inc., 59 Temple Place, Suite 330, Boston, MA  02111-1307  USA

-->
<piston_engine name="RR_Hawk">
 <!--
   http://en.wikipedia.org/wiki/Rolls-Royce_Hawk
    Rolls-Royce Hawk was an aero engine built by Rolls-Royce, similar
    to one bank of six cylinders from the Rolls-Royce Eagle.

     * Layout: Water cooled inline 6 cylinder
     * Power output: 75 hp @ 1350 rpm 7.4 litre
     * Bore: 4 inches
     * Stroke: 6 inches
     * Weight: 387 lbs

   It was produced between 1914 and 1918, during which 204 were built
   at Brazil Straker and one by Rolls-Royce.
 -->
 <!--
   Data plate photo at http://www.aeroplanedetouraine.fr/yvangot.htm
     No. 1.75.280
     BHP 85.5 at 1350 RPM
     Carburtr. Main Je<unreadable>
     Petrol Gals Per Hr 6.5
     Oil GalLs Per Hour 3.5
     Oil Press 22 LBs Per Sq In
     Air Screw 1350 RPM
     Left Hand Tractor
 -->
 <minmp unit="INHG">          6.0 </minmp> <!-- Ignored -->
 <maxmp unit="INHG">         29.9 </maxmp> <!-- Ignored -->
 <displacement unit="IN3"> 452.39 </displacement>
 <bsfc>          0.45 </bsfc>
 <maxhp>        85.50 </maxhp> <!-- Ignored -->
 <cycles>         4.0 </cycles>
 <idlerpm>      300.0 </idlerpm>
 <maxrpm>      1350.0 </maxrpm>
 <maxthrottle>    0.85</maxthrottle>
 <minthrottle>    0.1 </minthrottle>
 <sparkfaildrop>  0.1 </sparkfaildrop>
</piston_engine>
