<?xml version="1.0"?>
<!--
  Submarine Scout class airship.

  Copyright (C) 2007 - 2009  Anders Gidenstam  (anders(at)gidenstam.org)
  This file is licensed under the GPL license version 2 or later.
-->
<!--
JavaProp:
 #blades: 4
 RPM      1500 1/min
 Diameter 2.7432 m
 Spinner  0.1 m
 V        20.1168 m/s
 Power    63384.489 W
-->
<!--
   From [AHT,
   http://www.aht.ndirect.co.uk/airships/Technical%20Spec/SSZ%20Airship.htm]:

    Propeller               Four-bladed 9 feet diameter
-->
<propeller name="prop_SSZero">
  <!-- ixx unit="KG*M2"> 52.23 </ixx -->
  <ixx unit="KG*M2"> 25.0 </ixx>
  <diameter unit="IN"> 108.0 </diameter>
  <numblades> 4 </numblades>
  <gearratio>1.0</gearratio>

  <ct_factor> 0.75 </ct_factor> <!-- 1.0 seems too efficient. -->
  <cp_factor> 1.25 </cp_factor> <!-- 1.0 seems too efficient. -->

  <table name="C_POWER" type="internal">
     <tableData>
0.000	0.022637
0.050	0.020406
0.100	0.022000
0.150	0.023337
0.200	0.023212
0.250	0.022448
0.300	0.021195
0.350	0.019488
0.400	0.017271
0.450	0.014492
0.500	0.011098
0.510	0.010341
0.520	0.009558
0.530	0.008747
0.540	0.007908
0.550	0.007044
0.560	0.006149
0.570	0.005224
0.580	0.004275
0.590	0.003293
0.600	0.002281
     </tableData>
  </table>

  <table name="C_THRUST" type="internal">
     <tableData>
0.000	0.064912
0.050	0.069005
0.100	0.067250
0.150	0.061437
0.200	0.057351
0.250	0.051771
0.300	0.045483
0.350	0.038772
0.400	0.031658
0.450	0.024166
0.500	0.016314
0.510	0.014701
0.520	0.013078
0.530	0.011438
0.540	0.009784
0.550	0.008123
0.560	0.006444
0.570	0.004751
0.580	0.003053
0.590	0.001335
0.600	-0.00039
     </tableData>
  </table>

</propeller>
